// COMSOL Multiphysics 6.1.0.357 model "Arbitrary_stst_amplitude_size_paper.mph"
// Outline of the model tree

Parameters
  u0 = 0.1
  v0 = 100
  fu = 1
  fv = 1
  gu = -3
  gv = -2

Functions
  rn1: Random | nargs = 2; seed = 113013

Geometry
  geom1 "Geometry 1" (1D, length unit m)
    i1: Interval | coord = {0, 10}; p2 = 10
    fin: Finalize "Form Union"

Physics
  c: CoefficientFormPDE on all domains
    dependent variable u = {u, v}
    cfeq1: CoefficientFormPDE (default)
      c = {1, 0, 0, 10}
      f = {(u-u0)*u*v*fu/(u0*v0)+(v-v0)*u*v*fv/(u0*v0), (u-u0)*u*v*gu/(u0*v0)+(v-v0)*u*v*gv/(u0*v0)}
      da = {1, 0, 0, 1}
    zflx1: ZeroFluxBoundary "Zero Flux 1" (default)
    init1: init "Initial Values 1" (default)
      u = abs(u0+cos(x/10*2*pi)*0.1)
      v = abs(v0+rn1(2,x)*0.1)
      v2 = abs(v02+rn1(2,x)*0.1)
      u2 = abs(u02+rn1(1,x)*0.1)

Mesh
  mesh1 "Mesh 1" (physics-controlled)
    size: MeshSizeDefault | hauto = 2

Studies
  std1 "Study 1"
    param: Parametric "Parametric Sweep" | pname = u0; plistarr = {0.1,1,10,100}
    time: Transient "Time Dependent" | tlist = range(0,100,1000)

Solver configurations
  sol1 "Solution 1" (study std1)
    v1: Variables "Dependent Variables 1"
    t1: Time "Time-Dependent Solver 1" | tlist = range(0,100,1000)
      dDef: Direct
      fc1: FullyCoupled | linsolver = dDef
  sol2 "Parametric Solutions 1" (study std1)

Datasets
  dset2: Solution | solution = sol2

Plots
  pg5: PlotGroup1D "Coefficient Form PDE" | data = dset2
    lngr1: LineGraph on domains 1 | expr = u; xdata = expr; xdataexpr = x
  pg6: PlotGroup1D "1D Plot Group 6" | data = dset2
    lngr2: LineGraph on domains 1 | expr = v

Exports
  data1: Data
    data = dset2
    expr = {u, v}
    filename = C:\Users\Thomas Woolley\Dropbox\Turing_bespoke_2\Comsol\Arbitrary_stst_amplitude_control.txt