// COMSOL Multiphysics 5.1.0.234 model "Arbitrary_stst_paper.mph"
// Outline of the model tree

Parameters
  u0 = pi
  v0 = exp(1)
  fu = 1
  fv = 1
  gu = -3
  gv = -2
  u02 = 0.1
  v02 = 100

Functions
  rn1: Random | nargs = 2

Geometry
  geom1 "Geometry 1" (1D, length unit m)
    i1: Interval | p2 = 10; p = {0, 10}
    fin: Finalize "Form Union"

Physics
  c: CoefficientFormPDE on all domains
    dependent variable u = {u, v, u2, v2}
    cfeq1: CoefficientFormPDE (default)
      c = {1, 0, 0, 0, 0, 10, 0, 0, 0, 0, 1, 0, 0, 0, 0, 10}
      f = {(u-u0)*u*v*fu/(u0*v0)+(v-v0)*u*v*fv/(u0*v0), (u-u0)*u*v*gu/(u0*v0)+(v-v0)*u*v*gv/(u0*v0), (u2-u02)*u2*v2*fu/(u02*v02)+(v2-v02)*u2*v2*fv/(u02*v02), (u2-u02)*u2*v2*gu/(u02*v02)+(v2-v02)*u2*v2*gv/(u02*v02)}
      da = {1, 0, 0, 0, 0, 1, 0, 0, 0, 0, 1, 0, 0, 0, 0, 1}
    zflx1: ZeroFluxBoundary "Zero Flux 1" (default)
    init1: init "Initial Values 1" (default)
      u = abs(u0+rn1(1,x)*0.1)
      v = abs(v0+rn1(2,x)*0.1)
      u2 = abs(u02+rn1(1,x)*0.1)
      v2 = abs(v02+rn1(2,x)*0.1)

Mesh
  mesh1 "Mesh 1" (physics-controlled)
    size: MeshSizeDefault | hauto = 2

Studies
  std1 "Study 1"
    time: Transient "Time Dependent" | tlist = range(0,100,1000)

Solver configurations
  sol1 "Solution 1" (study std1)
    v1: Variables "Dependent Variables 1"
    t1: Time "Time-Dependent Solver 1" | tlist = range(0,100,1000)
      dDef: Direct
      fc1: FullyCoupled | linsolver = dDef

Datasets
  dset1: Solution | solution = sol1
  rn1_ds1: Grid2D
    source = function
    function = rn1
    par1 = t1
    parmin1 = 0
    parmax1 = 1
    par2 = t2
    parmin2 = 0
    parmax2 = 1

Plots
  pg1: PlotGroup1D "1D Plot Group 1" | data = dset1
    lngr1: LineGraph on all domains | expr = u; xdata = expr; xdataexpr = x
    lngr2: LineGraph on all domains | expr = v
  pg2: PlotGroup2D "2D Plot Group 2" | data = none; title = rn1
    plot1: Surface | data = rn1_ds1; expr = rn1(root.t1,root.t2)
      height1: Height "Height Expression 1"
  pg3: PlotGroup1D "1D Plot Group 3" | data = dset1
    lngr1: LineGraph on all domains | expr = u2
  pg4: PlotGroup1D "1D Plot Group 4" | data = dset1
    lngr2: LineGraph on all domains | expr = v2

Exports
  data1: Data
    data = dset1
    expr = {u, v, u2, v2}
    filename = C:\Users\smatw1\Dropbox\Turing_bespoke_2\Comsol\Arbitrary_stst.txt