// COMSOL Multiphysics 5.1.0.234 model "Large_domain_schnak_b_bifurcation.mph"
// Outline of the model tree

Parameters
  a = 0.1
  b = 2
  L = 10

Functions
  rn1: Random | nargs = 3

Geometry
  geom1 "Geometry 1" (2D, length unit m)
    sq1: Square | size = L
    r1: Rectangle | pos = {0, L+1}; size = {L, 2}
    fin: Finalize "Form Union"

Physics
  c: CoefficientFormPDE on all domains
    dependent variable u = {u, v}
    cfeq1: CoefficientFormPDE (default)
      c = {{1, 0, 0, 1}, {0, 0, 0, 0}, {0, 0, 0, 0}, {40, 0, 0, 40}}
      f = {a-u+u^2*v, b-u^2*v}
      da = {1, 0, 0, 1}
    zflx1: ZeroFluxBoundary "Zero Flux 1" (default)
    init1: init "Initial Values 1" (default) | u = a+b+rn1(x,y,1); v = b/(a+b)^2+rn1(x,y,2)

Mesh
  mesh1 "Mesh 1" (physics-controlled)
    size: MeshSizeDefault | hauto = 4

Studies
  std1 "Study 1"
    param: Parametric "Parametric Sweep" | pname = b; plistarr = {0.1,0.2,1,2,3}
    time: Transient "Time Dependent" | tlist = range(0,100,1e3)

Solver configurations
  sol1 "Solution 1" (study std1)
    v1: Variables "Dependent Variables 1"
    t1: Time "Time-Dependent Solver 1" | tlist = range(0,100,1e3)
      dDef: Direct
      fc1: FullyCoupled | linsolver = dDef
  sol2 "Parametric Solutions 1" (study std1)

Datasets
  dset1: Solution | solution = sol1
  dset2: Solution | solution = sol2

Plots
  pg1: PlotGroup2D "2D Plot Group 1" | data = dset1
    surf1: Surface | expr = u
  pg2: PlotGroup2D "2D Plot Group 2" | data = dset2
    surf1: Surface | expr = u