// COMSOL Multiphysics 6.1.0.357 model "Nonlinear_testing_gu_dv+2gv.mph"
// Outline of the model tree

Parameters
  s = 1.5
  gv = 2
  dv = 15

Functions
  rn1: Random | nargs = 2; seed = 113013

Geometry
  geom1 "Geometry 1" (1D, length unit m)
    i1: Interval | coord = {0, 40}
    fin: Finalize "Form Union"

Physics
  c: CoefficientFormPDE on all domains
    dependent variable u = {u1, v1, u2, v2, u3, v3, u4, v4}
    EquationForm.form = Automatic
    cfeq1: CoefficientFormPDE (default)
      c = {1, 0, 0, 0, 0, 0, 0, 0, 0, 50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}
      f = {u1*v1*(u1-1)+u1*v1*(v1-1), -u1*v1*(u1-1)*6-u1*v1*(v1-1)*2, u2*v2*(u2-1)+u2*v2*(v2-1), -u2*v2*(u2-1)*6-u2*v2*(v2-1)*3, u3*v3*(u3-1)+u3*v3*(v3-1), -u3*v3*(u3-1)*(dv+2*gv)/4-u3*v3*(v3-1)*gv, u4*v4*(u4-1)+u4*v4*(v4-1), -u4*v4*(u4-1)*6-u4*v4*(v4-1)*3}
      da = {1, 0, 0, 0, 0, 0, 0, 0, 0, 1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}
    zflx1: ZeroFluxBoundary "Zero Flux 1" (default)
    init1: init "Initial Values 1" (default)
      u1 = abs(1+rn1(x,1)*s)
      v1 = abs(1+rn1(x,2)*s)
      u2 = abs(1+rn1(x,3)*s)
      v2 = abs(1+rn1(x,4)*s)
      u3 = abs(1+rn1(x,5)*s)
      v3 = abs(1+rn1(x,6)*s)
      u4 = abs(1+rn1(x,5)*s)
      v4 = abs(1+rn1(x,6)*s)

Mesh
  mesh1 "Mesh 1" (physics-controlled)
    size: MeshSizeDefault | hauto = 1

Studies
  std1 "Study 1"
    param: Parametric "Parametric Sweep" | pname = dv; plistarr = range(10,1,20)
    time: Transient "Time Dependent" | tlist = range(0,100,1000)

Solver configurations
  sol1 "Solution 1" (study std1)
    v1: Variables "Dependent Variables 1"
    t1: Time "Time-Dependent Solver 1" | tlist = range(0,100,1000)
      dDef: Direct
      fc1: FullyCoupled | linsolver = dDef
  sol2 "Parametric Solutions 1" (study std1)

Datasets
  dset1: Solution | solution = sol1
  dset2: Solution | solution = sol2

Plots
  pg1: PlotGroup1D "1D Plot Group 1" | data = dset1
    lngr1: LineGraph on all domains | expr = u1
    lngr2: LineGraph on all domains | expr = u2
  pg2: PlotGroup1D "1D Plot Group 2" | data = dset1
    lngr3: LineGraph on all domains | expr = u3
    lngr4: LineGraph on all domains | expr = u4
  pg3: PlotGroup1D "1D Plot Group 3" | data = dset1
    lngr3: LineGraph on all domains | expr = u3
  pg4: PlotGroup1D "Coefficient Form PDE" | data = dset2
    lngr1: LineGraph on domains 1 | expr = u3; xdata = expr; xdataexpr = x