// COMSOL Multiphysics 6.1.0.357 model "Nonlinear_testing_gu_gv+2_single_fiddle.mph"
// Outline of the model tree

Parameters
  s = 1.5
  gv = 2
  dv = 15

Functions
  rn1: Random | nargs = 2; seed = 113013

Geometry
  geom1 "Geometry 1" (1D, length unit m)
    i1: Interval | coord = {0, 40}
    fin: Finalize "Form Union"

Physics
  c: CoefficientFormPDE on all domains
    dependent variable u = {u4, v4}
    EquationForm.form = Automatic
    cfeq1: CoefficientFormPDE (default)
      c = {1, 0, 0, 3*gv+7}
      f = {u4*v4*(u4-1)+u4*v4*(v4-1), -u4*v4*(u4-1)*(gv+2)-u4*v4*(v4-1)*(gv+1)}
      da = {1, 0, 0, 1}
    zflx1: ZeroFluxBoundary "Zero Flux 1" (default)
    init1: init "Initial Values 1" (default)
      u4 = abs(1+rn1(x,5)*s)
      v4 = abs(1+rn1(x,6)*s)
      u1 = abs(1+rn1(x,1)*s)
      v1 = abs(1+rn1(x,2)*s)
      u2 = abs(1+rn1(x,3)*s)
      v2 = abs(1+rn1(x,4)*s)
      u3 = abs(1+rn1(x,5)*s)
      v3 = abs(1+rn1(x,6)*s)

Mesh
  mesh1 "Mesh 1" (physics-controlled)
    size: MeshSizeDefault | hauto = 1

Studies
  std1 "Study 1"
    param1: Parametric "Parametric Sweep 1" (disabled) | pname = dv; plistarr = range(10,1,20)
    param: Parametric "Parametric Sweep" | pname = gv; plistarr = {0.1,0.5,1,2,10,50,100}
    time: Transient "Time Dependent" | tlist = range(0,100,1000)

Solver configurations
  sol1 "Solution 1" (study std1)
    v1: Variables "Dependent Variables 1"
    t1: Time "Time-Dependent Solver 1" | tlist = range(0,100,1000)
      dDef: Direct
      fc1: FullyCoupled | linsolver = dDef
  sol2 "Parametric Solutions 1" (study std1)
  sol14 "Parametric Solutions 2" (study std1)

Datasets
  dset1: Solution | solution = sol1
  dset2: Solution | solution = sol2
  dset3: Solution | solution = sol14

Plots
  pg1: PlotGroup1D "Coefficient Form PDE" | data = dset3
    lngr1: LineGraph on domains 1 | expr = u4; xdata = expr; xdataexpr = x