// COMSOL Multiphysics 6.1.0.357 model "Subcritical_bif_tester.mph"
// Outline of the model tree

Parameters
  L = 4.35
  gu = 3.5
  gv = 2
  gvv = 5

Functions
  rn1: Random | nargs = 2; seed = 113013

Geometry
  geom1 "Geometry 1" (1D, length unit m)
    i1: Interval | coord = {0, L}
    fin: Finalize "Form Union"

Physics
  c: CoefficientFormPDE on all domains
    dependent variable u = {u, v}
    EquationForm.form = Automatic
    cfeq1: CoefficientFormPDE (default)
      c = {1, 0, 0, 10}
      f = {(u-1)*u*v+(v-1)*u*v, -gu*(u-1)*v*u-(v-1)*v*u*gv+(v-1)^2*v*u*gvv}
      da = {1, 0, 0, 1}
    zflx1: ZeroFluxBoundary "Zero Flux 1" (default)
    init1: init "Initial Values 1" (default) | u = 3+0*(1+cos(pi/L*x)); v = 3+0*(1-cos(pi/L*x))

Mesh
  mesh1 "Mesh 1" (physics-controlled)
    size: MeshSizeDefault | hauto = 1

Studies
  std1 "Study 1"
    time: Transient "Time Dependent" | tlist = range(0,1,100)

Solver configurations
  sol1 "Solution 1" (study std1)
    v1: Variables "Dependent Variables 1"
    t1: Time "Time-Dependent Solver 1" | tlist = range(0,1,100)
      dDef: Direct
      fc1: FullyCoupled | linsolver = dDef

Datasets
  dset1: Solution | solution = sol1

Plots
  pg1: PlotGroup1D "Coefficient Form PDE" | data = dset1
    lngr1: LineGraph on domains 1 | expr = u; xdata = expr; xdataexpr = x
    lngr2: LineGraph on all domains | expr = v